// COMSOL Multiphysics 6.2.0.290 model "anisotropic_bistable_unit.mph"
// Outline of the model tree

Parameters
  beta1 = pi/3[rad]
  beta2 = pi/3[rad]
  beta3 = pi-beta1-beta2
  l1 = 15[mm]
  t_flank = 0.5[mm]
  P1x = 0[mm]
  P1y = 0[mm]
  P2x = l1
  P2y = 0[mm]
  P3x = l1*tan(beta2)/(tan(beta1)+tan(beta2))
  P3y = tan(beta1) * P3x
  Cx = (P1x + P2x + P3x)/3
  Cy = (P1y + P2y + P3y)/3
  e12x = P2x-P1x
  e12y = P2y-P1y
  len12 = sqrt(e12x^2+e12y^2)
  t12x = e12x/len12
  t12y = e12y/len12
  n12x = t12y
  n12y = -t12x
  P1_in12x = P1x+t_flank * n12x
  P1_in12y = P1y+t_flank * n12y
  P2_in12x = P2x+t_flank * n12x
  P2_in12y = P2y+t_flank * n12y
  t_cut = 0.8[mm]
  t_ligament = 0.1[mm]
  scale = 1
  d = 0[mm]

Geometry
  geom1 "Geometry 1" (2D, length unit m)
    pol1: Polygon "TriOuter" | source = table; table = {{P1x, P1y}, {P2x, P2y}, {P3x, P3y}}
    pol2: Polygon
      source = table
      table = 
        {0.00767320508076, 0.0126903810568}
        {0.00115470053838, 0.0014}
        {0.000230940107676, 0.0014}
        {0.00721132486541, 0.0134903810568}
    coi7: Coincident | entity1 = pol2(1) points 1; entity2 = pol1(1) boundaries 2
    coi8: Coincident | entity1 = pol2(1) points 4; entity2 = pol1(1) boundaries 2
    coi1: Coincident | entity1 = pol2(1) points 1; entity2 = pol1(1) boundaries 2
    coi2: Coincident | entity1 = pol2(1) points 4; entity2 = pol1(1) boundaries 2
    para2: Parallel | edge = pol2(1) boundaries 2; pol1(1) boundaries 1
    dist2: Distance "Distance_flank" | entity1 = pol2(1) boundaries 3; entity2 = pol1(1) boundaries 3; distance = t_flank
    para1: Parallel | edge = pol2(1) boundaries 1, 3; pol1(1) boundaries 3
    dist1: Distance "Distance_cut" | entity1 = pol2(1) boundaries 1; entity2 = pol2(1) boundaries 3; distance = t_cut
    coi10: Coincident | entity1 = pol2(1) points 4; entity2 = pol1(1) boundaries 2
    coi11: Coincident | entity1 = pol2(1) points 1; entity2 = pol1(1) boundaries 2
    pol3: Polygon
      source = table
      table = 
        {0.0144226497308, 0}
        {0.00744226497308, 0.0120903810568}
        {0.00698038475773, 0.0112903810568}
        {0.0134988893001, 0}
    para3: Parallel | edge = pol3(1) boundaries 1, 3; pol1(1) boundaries 2
    para4: Parallel | edge = pol3(1) boundaries 2; pol1(1) boundaries 3
    coi3: Coincident | entity1 = pol3(1) points 1; entity2 = pol1(1) boundaries 1
    coi4: Coincident | entity1 = pol3(1) points 4; entity2 = pol1(1) boundaries 1
    dist4: Distance | entity1 = pol1(1) boundaries 2; entity2 = pol3(1) boundaries 1; distance = t_flank
    dist3: Distance | entity1 = pol3(1) boundaries 1; entity2 = pol3(1) boundaries 3; distance = t_cut
    dist5: Distance | entity1 = pol3(1) boundaries 2; entity2 = pol2(1) boundaries 1; distance = t_ligament
    coi9: Coincident | entity1 = pol3(1) points 1; entity2 = pol1(1) boundaries 1
    pol4: Polygon
      source = table
      table = 
        {0.000288675134595, 5.0E-4}
        {0.0130947441117, 5.0E-4}
        {0.0126328638963, 0.0013}
        {0.000750555349947, 0.0013}
    coi5: Coincident | entity1 = pol1(1) boundaries 3; entity2 = pol4(1) points 1
    coi6: Coincident | entity1 = pol4(1) points 4; entity2 = pol1(1) boundaries 3
    para5: Parallel | edge = pol4(1) boundaries 1, 3; pol1(1) boundaries 1
    para6: Parallel | edge = pol1(1) boundaries 2; pol4(1) boundaries 2; pol3(1) boundaries 3
    dist6: Distance | entity1 = pol1(1) boundaries 1; entity2 = pol4(1) boundaries 1; distance = t_flank
    dist8: Distance | entity1 = pol4(1) boundaries 2; entity2 = pol3(1) boundaries 3; distance = t_ligament
    dist9: Distance | entity1 = pol2(1) boundaries 2; entity2 = pol4(1) boundaries 3; distance = t_ligament
    dist7: Distance | entity1 = pol4(1) boundaries 3; entity2 = pol4(1) boundaries 1; distance = t_cut
    dif1: Difference | input = pol1; input2 = pol2, pol3, pol4
    fin: Finalize "Form Union"

Materials
  mat1: Common "Material 1" on all domains
    def "Basic"
      density = 2700
    Enu "Young's modulus and Poisson's ratio"
      E = 7e9
      nu = 0.2

Physics
  solid: SolidMechanics on all domains
    dependent variable u = {u, v, w}
    d.d = 1[mm]
    lemm1: LinearElasticModel "Linear Elastic Material 1" (default)
    free1: Free (default)
    init1: init "Initial Values 1" (default)
    disp1: Displacement0 "Prescribed Displacement 1" (disabled) on points 1
      Direction = {prescribed, prescribed, free}
      U0 = {d*(P1x-P2x)/sqrt((P1x-P2x)^2+(P1y-P2y)^2), d*(P1y-P2y)/sqrt((P1x-P2x)^2+(P1y-P2y)^2), 0}
    disp2: Displacement0 "Prescribed Displacement 2" (disabled) on points 13
      Direction = {prescribed, prescribed, free}
      U0 = {d*(P2x-P3x)/sqrt((P2x-P3x)^2+(P2y-P3y)^2), d*(P2y-P3y)/sqrt((P2x-P3x)^2+(P2y-P3y)^2), 0}
    disp3: Displacement0 "Prescribed Displacement 3" (disabled) on points 1
      Direction = {prescribed, prescribed, free}
      U0 = {d*(P3x-P1x)/sqrt((P1x-P3x)^2+(P1y-P3y)^2), d*(P3y-P1y)/sqrt((P1x-P3x)^2+(P1y-P3y)^2), 0}
    disp4: Displacement1 "Prescribed Displacement 4" on boundaries 11
      Direction = {prescribed, prescribed, free}
      U0 = {d, 0, 0}
    disp5: Displacement1 "Prescribed Displacement 5" on boundaries 4
      Direction = {prescribed, prescribed, free}
      U0 = {d*cos(beta1)/sin(beta1)*sin(beta2), d*sin(beta1)/sin(beta1)*sin(beta2), 0}
    disp6: Displacement1 "Prescribed Displacement 6" on boundaries 2
      Direction = {prescribed, prescribed, free}
      U0 = {0, 0, 0}

Mesh
  mesh1 "Mesh 1" (physics-controlled)
    size: MeshSizeDefault | hauto = 3

Studies
  std1 "Study 1"
    stat: Stationary | geometricNonlinearity = on; useparam = on; pname = d; plistarr = range(0,0.0001,0.0075); punit = m

Solver configurations
  sol1 "Solution 1" (study std1)
    v1: Variables "Dependent Variables 1"
    s1: Stationary "Stationary Solver 1"
      dDef: Direct
      p1: Parametric
      fc1: FullyCoupled | linsolver = dDef

Datasets
  dset1: Solution | solution = sol1

Plots
  pg1: PlotGroup2D "Stress (solid)" | data = dset1
    surf1: Surface | expr = solid.misesGp
      def: Deform "Deformation" | expr = {u, v}; descr = Displacement field
  pg2: PlotGroup1D "Energy-displacement curve" | data = dset1
    glob1: Global | expr = solid.Wh_tot; descr = Total stored energy
  pg3: PlotGroup1D "Force-displacement curve" | data = dset1