// COMSOL Multiphysics 6.2.0.290 model "beam.mph"
// Outline of the model tree

Geometry
  geom1 "Geometry 1" (2D, length unit m)
    ls1: LineSegment | specify1 = coord; specify2 = coord; coord2 = {1, 0}
    fin: Finalize "Form Union"

Materials
  mat1: Common "Material 1" on all boundaries
    def "Basic"
      density = 2700
    Enu "Young's modulus and Poisson's ratio"
      E = 4.3e11
      nu = 0

Physics
  beam: HermitianBeam on all boundaries
    dependent variable u3 = {u3, v3, w3}
    emm1: Elastic "Linear Elastic Material 1" (default)
    csd1: CrossSectionBeam "Cross-Section Data 1" (default) | area = 1*0.01; Izz = 1/12*1*(0.01)^3
    free1: Free (default)
    init1: init "Initial Values 1" (default)
    pdr1: DispRot0 "Prescribed Displacement/Rotation 1" on points 1
      DirectionRot = {1, 0, 0}
      THETA_0B = pi/10
      Direction = {prescribed, prescribed, free}
    pdr2: DispRot0 "Prescribed Displacement/Rotation 2" on points 2
      DirectionRot = {1, 0, 0}
      THETA_0B = pi/7
      Direction = {prescribed, prescribed, free}
      U0 = {0, 0, 0}

Mesh
  mesh1 "Mesh 1" (physics-controlled)

Studies
  std1 "Study 1"
    stat: Stationary | geometricNonlinearity = on

Solver configurations
  sol1 "Solution 1" (study std1)
    v1: Variables "Dependent Variables 1"
    s1: Stationary "Stationary Solver 1"
      dDef: Direct
      fc1: FullyCoupled | linsolver = dDef

Datasets
  dset1: Solution | solution = sol1

Derived values
  gev1: EvalGlobal "Global Evaluation 1"
    data = dset1
    table = tbl1
    expr = beam.Ws_tot
    unit = J
    descr = Total strain energy

Tables
  tbl1: Table
    // Global Evaluation 1
    Total strain energy (J)
    85805.1

Plots
  pg1: PlotGroup2D "Stress (beam)" | data = dset1
    line1: Line | expr = beam.mises; linetype = tube; radiusexpr = beam.re
      def: Deform "Deformation" | expr = {u3, v3}; descr = Displacement field
  pg2: PlotGroup2D "2D Plot Group 2" | data = dset1
    line1: Line | expr = beam.disp
      def1: Deform "Deformation 1" | expr = {u3, v3}
  pg3: PlotGroup1D "1D Plot Group 3" | data = dset1
    lngr1: LineGraph on boundaries 1 | expr = beam.disp
  pg4: PlotGroup2D "Stress (beam) 1" | data = dset1
    line1: Line | expr = beam.WsB; descr = Bending strain energy; linetype = tube; radiusexpr = beam.re
      def: Deform "Deformation" | expr = {u3, v3}; descr = Displacement field