// COMSOL Multiphysics 6.2.0.290 model "bistable_tri.mph"
// Outline of the model tree

Parameters
  l1 = 0.85 * edgeLen
  l2 = (2/sqrt(3))*(edgeLen - l1 - l4) *sin(A)
  l3 = l6 - l5 - 1.5*l2 - l2 * ( (sqrt(3)/2) * (cos(pi/3 - beta) / sin(pi/3 - beta)) )
  l4 = 0.05 * edgeLen
  t = 0.015*edgeLen
  L = l1+l4
  delta = 0.5*L
  edgeLen = 15[m]
  beta = pi/40  // Tilting angle
  A = pi/3-beta
  l6 = (2/sqrt(3)) * sin(pi/3 - beta) * (l1 - 0.5*l4)- cos(pi/3 - beta) * l4
  l5 = ( (sqrt(3)/2) * l4 + sin(beta) * l6 ) / sin(pi/3 - beta)

Geometry
  geom1 "Geometry 1" (2D, length unit m)
    pol1: Polygon "flank_1"
      source = table
      table = 
        {0, 0}
        {-l1*sin(pi/3), -l1*cos(pi/3)}
        {-l1*sin(pi/3)+l5*cos(pi/6-beta), -l1*cos(pi/3)-l5*sin(pi/6-beta)}
        {0, -l4}
    pol2: Polygon "filament_1"
      source = table
      table = 
        {-l1*sin(pi/3)+l5*cos(pi/6-beta), -l1*cos(pi/3)-l5*sin(pi/6-beta)}
        {-l1*sin(pi/3)+l5*cos(pi/6-beta)+ l2*cos(pi/6-beta), -l1*cos(pi/3)-l5*sin(pi/6-beta)- l2*sin(pi/6-beta)}
        {-l1*sin(pi/3)+l5*cos(pi/6-beta)+ l2*cos(pi/6-beta)+t*cos(pi/6+beta), -l1*cos(pi/3)-l5*sin(pi/6-beta)- l2*sin(pi/6-beta) +t*sin(pi/6+beta)}
        {-l1*sin(pi/3)+l5*cos(pi/6-beta)+t*cos(pi/6+beta), -l1*cos(pi/3)-l5*sin(pi/6-beta)+t*sin(pi/6+beta)}
    pol3: Polygon "Inner triangle"
      source = table
      table = 
        {-l1*sin(pi/3)+l5*cos(pi/6-beta)+ l2*cos(pi/6-beta), -l1*cos(pi/3)-l5*sin(pi/6-beta)- l2*sin(pi/6-beta)}
        {-l1*sin(pi/3)+l5*cos(pi/6-beta)+ l2*cos(pi/6-beta)+l3*cos(pi/6+beta), -l1*cos(pi/3)-l5*sin(pi/6-beta)- l2*sin(pi/6-beta)+l3*sin(pi/6+beta)}
        {-l1*sin(pi/3)+l5*cos(pi/6-beta)+ l2*cos(pi/6-beta)+l3*cos(pi/6-beta), -l1*cos(pi/3)-l5*sin(pi/6-beta)- l2*sin(pi/6-beta)-l3*sin(pi/6-beta)}
    pt1: Point | p = {-edgeLen*sqrt(3)/6, -0.5*edgeLen}
    rot1: Rotate
      input = pol1, pol2
      keep = on
      rot = 120
      specifycenter = vertex
      pos = {-(L+l2+l4)*sqrt(3)/6, -0.5*(L+l2+l4)}
      center = pt1(1) points 1
    rot2: Rotate
      input = pol1, pol2
      keep = on
      rot = -120
      specifycenter = vertex
      pos = {-(L+l2+l4)*sqrt(3)/6, -0.5*(L+l2+l4)}
      center = pt1(1) points 1
    mir1: Mirror (disabled) | input = pol1, pol2, pol3, rot1, rot2; keep = on; axis = {1, 0}
    mir2: Mirror (disabled)
      input = pol1, pol2, pol3, rot1, rot2
      keep = on
      specify = edge
      edge = pol1(1) boundaries 2
      axis = {1, 0}
    rot4: Rotate (disabled) | input = mir1(1), mir1(2), mir1(3), mir1(4), mir1(5), mir1(6), mir1(7); keep = on; rot = 120
    mir3: Mirror (disabled) | input = mir2, rot4; keep = on; axis = {1, 0}
    fin: Finalize "Form Union"
    sel1: ExplicitSelection | selection = fin(1) domains 3, 5, 6

Materials
  mat1: Common "rigid" on domains 1, 2, 4, 7
    def "Basic"
      density = 2750
    Enu "Young's modulus and Poisson's ratio"
      E = 4.33e11
      nu = 0.2
  mat2: Common "soft" on domains 3, 5, 6
    def "Basic"
      density = 2750
    Enu "Young's modulus and Poisson's ratio"
      E = 4.33e11
      nu = 0.2

Physics
  solid: SolidMechanics on all domains
    dependent variable u = {u, v, w}
    lemm1: LinearElasticModel "Linear Elastic Material 1" (default)
    free1: Free (default)
    init1: init "Initial Values 1" (default)
    fix1: Fixed "Fixed Constraint 1" on boundaries 5, 27
    disp7: Displacement1 "Prescribed Displacement 7" on boundaries 26
      Direction = {prescribed, prescribed, free}
      U0 = {0, -delta, 0}
    disp8: Displacement1 "Prescribed Displacement 8" on boundaries 2
      Direction = {prescribed, prescribed, free}
      U0 = {-delta*sin(pi/3), -delta*cos(pi/3), 0}

Mesh
  mesh1 "Mesh 1" (physics-controlled)
    size: MeshSizeDefault | hauto = 2

Studies
  std1 "Study 1"
    stat: Stationary
      geometricNonlinearity = on
      useparam = on
      pname = delta
      plistarr = range(0,0.1,edgeLen*0.55)
      punit = m

Solver configurations
  sol1 "Solution 1" (study std1)
    v1: Variables "Dependent Variables 1"
    s1: Stationary "Stationary Solver 1"
      dDef: Direct
      p1: Parametric
      fc1: FullyCoupled | linsolver = dDef

Datasets
  dset1: Solution | solution = sol1
  dset2: Solution "Unselected domains" on domains 1, 2, 4, 7 | solution = sol1
  dset3: Solution "selected domains" on domains 3, 5, 6 | solution = sol1

Derived values
  gev1: EvalGlobal "Global Evaluation 1"
    data = dset1
    table = tbl1
    expr = solid.Wh_tot
    unit = J
    descr = Total stored energy

Tables
  tbl1: Table
    // Global Evaluation 1
    delta (m) | Total stored energy (J)
    0 | 0
    0.1 | 4.12383e+06
    0.2 | 1.53516e+07
    0.3 | 3.2314e+07
    0.4 | 5.39798e+07
    0.5 | 7.95489e+07
    0.6 | 1.08384e+08
    0.7 | 1.39966e+08
    0.8 | 1.73863e+08
    0.9 | 2.09705e+08
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
Plots
  pg2: PlotGroup2D "Stress (solid) 1" | data = dset1
    surf1: Surface | expr = solid.WhGp; unit = J/m^3; descr = Stored energy density
      def: Deform "Deformation" | expr = {u, v}; descr = Displacement field
  pg3: PlotGroup1D "1D Plot Group 3" | data = dset1
    glob1: Global | expr = solid.Wh_tot; descr = Total stored energy

Exports
  data1: Data | data = dset1; expr = {delta, solid.Wh_tot}