// COMSOL Multiphysics 6.2.0.290 model "sphere.mph"
// Outline of the model tree

Parameters
  load = 1[N/m^2]

Geometry
  geom1 "Geometry 1" (3D, length unit cm)
    wp1: WorkPlane | unite = on
      r2: Rectangle | size = {10, 5}
      r1: Rectangle | pos = {-2.5, 2.5}; base = center; size = {5, 1}
      r3: Rectangle | pos = {15, 2.5}; base = center; size = {10, 1}
      copy1: Copy | input = r2; keep = on; displx = 20; disply = 0
      copy2: Copy | input = r1; keep = on; displx = 35; disply = 0
      rot1: Rotate | input = copy1, copy2, r1, r2, r3; keep = on; rot = 90; pos = {15, 2.5}
    fin: Finalize "Form Union"

Materials
  mat1: Common "Material 1" on all boundaries
    def "Basic"
      density = 1
    Enu "Young's modulus and Poisson's ratio"
      E = 1e9
      nu = 0.2

Physics
  shell: Shell on all boundaries
    dependent variable u = {u, v, w}
    emm1: Elastic "Linear Elastic Material 1" (default)
      shls1: ShellLocalSystem (default)
    to1: ThicknessOffset "Thickness and Offset 1" (default) | d = 0.1[cm]
    free1: Free (default)
    init1: init "Initial Values 1" (default)
    fix1: Fixed "Fixed Constraint 1" on edges 1, 32
    disp1: Displacement1 "Prescribed Displacement/Rotation 1" on edges 56
      Direction = {free, prescribed, prescribed}
      RotationType = RotationGroup
    disp2: Displacement1 "Prescribed Displacement/Rotation 2" on edges 21
      Direction = {prescribed, free, prescribed}
      RotationType = RotationGroup
    fl1: FaceLoad on boundaries 1-13 | Ff = {0, 0, load}; coordinateSystem = sys1

Mesh
  mesh1 "Mesh 1"
    size: MeshSizeDefault | hauto = 1
    map1: Map "Mapped 1" on boundaries 1-7, 9-13

Studies
  std1 "Study 1"
    stat: Stationary | geometricNonlinearity = on; useparam = on; pname = load; plistarr = range(0,0.5,50); punit = N/m^2

Solver configurations
  sol1 "Solution 1" (study std1)
    v1: Variables "Dependent Variables 1"
      comp1_ar: Field "Displacement of shell normals (comp1.ar)" | scalemethod = manual; scaleval = 0.01
    s1: Stationary "Stationary Solver 1"
      dDef: Direct
      p1: Parametric
      fc1: FullyCoupled | linsolver = dDef

Datasets
  dset1: Solution | solution = sol1
  dset1shellshl: Shell
    data = dset1
    seplevels = off
    resolution = 2
    orientationexpr = {shell.nlX, shell.nlY, shell.nlZ}
    displacementexpr = {arx, ary, arz}
    distanceexpr = shell.z_pos
    areascalefactor = shell.ASF
    linescalefactor = shell.LSF

Plots
  pg1: PlotGroup3D "Stress (shell)" | data = dset1shellshl
    surf1: Surface | expr = shell.misesGp; descr = von Mises stress
      def: Deform "Deformation" | expr = {shell.u, shell.v, shell.w}
    arws1: ArrowSurface | expr = {shell.F_Ax, shell.F_Ay, shell.F_Az}; descr = Load (spatial frame)
      def1: Deform "Deformation 1" | expr = {u, v, w}